Aircraft Test
#Mach
0.250
#IYsym   IZsym   Zsym
0       0       0.0
#Sref    Cref    Bref
15.72   1.57   10.26
#Xref    Yref    Zref
1.68     4.75     0.00
#
#
#====================================================================
SURFACE
Wing
#Nchordwise  Cspace   Nspanwise   Sspace
10    1.0    20    1.0
#
YDUPLICATE
0.0
#
ANGLE
0.0

#-------------------------------------------------------------
SECTION
# Xle Yle Zle Chord Ainc Nspan Sspace
0 0 0 2.09 0 0 0
AFILE
/Users/ericchiang/Documents/Visual Studio Code/AE-298/avl/airfoils/naca652415.dat
#-------------------------------------------------------------
SECTION
# Xle Yle Zle Chord Ainc Nspan Sspace
0.48 1.25 0 1.61 0 0 0
AFILE
/Users/ericchiang/Documents/Visual Studio Code/AE-298/avl/airfoils/naca652415.dat
#-------------------------------------------------------------
SECTION
# Xle Yle Zle Chord Ainc Nspan Sspace
0.48 2.51 0 1.61 0 0 0
AFILE
/Users/ericchiang/Documents/Visual Studio Code/AE-298/avl/airfoils/naca652415.dat
#-------------------------------------------------------------
SECTION
# Xle Yle Zle Chord Ainc Nspan Sspace
0.66 5.04 0 1.1 0 0 0
AFILE
/Users/ericchiang/Documents/Visual Studio Code/AE-298/avl/airfoils/naca652415.dat
#-------------------------------------------------------------
SECTION
# Xle Yle Zle Chord Ainc Nspan Sspace
0.7 5.13 0 0.91 0 0 0
AFILE
/Users/ericchiang/Documents/Visual Studio Code/AE-298/avl/airfoils/naca652415.dat
